<?xml version="1.0" encoding="UTF-8"?>
<!-- Destination: Mooney-M20M/FDM/Mooney-M20M.xml -->
<!-- Minimal JSBSim placeholder config: NO external Systems/Engines/Props includes.
     Purpose: allow FlightGear to load the aircraft without quitting at splash. -->

<fdm_config version="2.0" release="ALPHA">
    <fileheader>
        <author>Philips</author>
        <description>Mooney M20M Bravo - minimal placeholder FDM for load stability.</description>
        <note>
            This file intentionally contains only metrics and mass_balance.
            Add aerodynamics/controls/gear/propulsion later, incrementally.
        </note>
    </fileheader>

    <!-- Basic geometry. Values are placeholders; they just need to exist. -->
    <metrics file="FDM/Config/MooneyM20M-metrics" />
    <aerodynamics file="FDM/Config/MooneyM20M-aerodynamics" />
    <ground_reactions file="FDM/Config/MooneyM20M-ground-reactions" />
    <mass_balance file="FDM/Config/MooneyM20M-mass-balance" />
    <external_reactions file="FDM/Config/MooneyM20M-external-reactions" />
</fdm_config>
